*HEADING
ABAQUS-style file created by OOF2 on 2015-09-24 11:06:12.658326 from a mesh of the microstructure solve_test.
 ** Materials defined by OOF2:
**   bricks:
**     name: Mechanical:Elasticity:Isotropic:stiff
**     cijkl: IsotropicRank4TensorCij(c11=1.2,c12=0.5)
**     name: Color:wred
**     color: RGBAColor(red=0.75000,green=0.00000,blue=0.00000,alpha=1.0000)
**   mortar:
**     name: Color:bloo
**     color: RGBAColor(red=0.00000,green=0.00000,blue=0.75000,alpha=1.0000)
**     name: Mechanical:Elasticity:Isotropic:soft
**     cijkl: IsotropicRank4TensorCij(c11=0.8,c12=0.5)
** Master elements used in OOF2:
**   3: T3_3, Isoparametric 3 noded triangle with linear interpolation for both fields and positions.
**   4: Q4_4, Isoparametric 4 noded quadrilateral with bilinear interpolation for both positions and fields
** Boundary Conditions:
**   bc<2>: DirichletBC(field=Displacement,field_component='y',equation=Force_Balance,eqn_component='y',profile=ConstantProfile(value=15.0),boundary='top')
**   bc<4>: DirichletBC(field=Displacement,field_component='x',equation=Force_Balance,eqn_component='x',profile=ConstantProfile(value=0.0),boundary='bottom')
**   bc<3>: DirichletBC(field=Displacement,field_component='x',equation=Force_Balance,eqn_component='x',profile=ConstantProfile(value=0.0),boundary='top')
**   bc: DirichletBC(field=Displacement,field_component='y',equation=Force_Balance,eqn_component='y',profile=ConstantProfile(value=0.0),boundary='bottom')
** Notes:
**   The set of nodes and elements may be different from the set
**    created from a skeleton depending on the element type and if the
**    mesh was refined.
** The materials and boundary conditions provided by OOF2 may be
**   translated into ABAQUS by the user.
** The element type provided below should be verified and modified
**   accordingly.
** Only elements (and nodes of such elements) that have an associated
**   material are included in this file.
*NODE
325, 53.706594805, 0.0
321, 112.815803912, 141.983610723
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** The OOF2 element type is T3_3. The type provided for ABAQUS is only a guess
** and may have to be modified by the user to be meaningful.
*ELEMENT, TYPE=CPS3
190, 5, 7, 10
191, 5, 10, 6
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** The OOF2 element type is Q4_4. The type provided for ABAQUS is only a guess
** and may have to be modified by the user to be meaningful.
*ELEMENT, TYPE=CPS4
1, 1, 2, 3, 4
2, 2, 5, 6, 3
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** Point boundaries in OOF2
*NSET, NSET=topleft
346
*NSET, NSET=bottomleft
1
*NSET, NSET=topright
324
*NSET, NSET=bottomright
31
** Edge boundaries in OOF2
*NSET, NSET=top
324, 322, 323, 358, 357, 355
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*NSET, NSET=right
31, 32, 60, 61, 104, 106, 170, 171, 172, 232, 233, 234, 303, 304, 324
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*ELSET, ELSET=bricks
1, 2, 3, 4, 5, 6
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*SOLID SECTION, ELSET=bricks, MATERIAL=bricks
*ELSET, ELSET=mortar
18, 29, 30, 33, 34, 37
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*SOLID SECTION, ELSET=mortar, MATERIAL=mortar
*MATERIAL, NAME=bricks
** Use the information in the header to complete these fields under MATERIAL
*MATERIAL, NAME=mortar
** Use the information in the header to complete these fields under MATERIAL
